F_HSI := 8 MHz
PLLMUL := 9
F_PLLCLK := F_HSI/2*PLLMUL = 36 MHz
F_SYSCLK := F_PLLCLK
AHBPrescaler := 1
F_HCLK := F_SYSCLK/AHBPrescaler = 36 MHz
APB1Prescaler := 2
F_APB1 := F_HCLK/APB1Prescaler = 18 MHz
APB2Prescaler := 1
F_APB2 := F_HCLK/APB2Prescaler = 36 MHz
F_TIM2CLK :=
    F_APB1 if APB1Prescaler == 1
    (F_APB1*2) otherwise
    = 36 MHz
TIM2Prescaler := 36000
TIM2_PSC := TIM2Prescaler - 1 = 35999
F_CK_CNT := F_TIM2CLK/TIM2Prescaler = 1 kHz
T_tick := 1/F_CK_CNT
T_PWM := 1 s
N_ticks := T_PWM/T_tick = 1000
TIM2_ARR := N_ticks - 1 = 999
t_pulse := 10 ms
N_pulse.ticks := T_PWM/t_pulse = 100
TIM2_CCR4 := N_pulse.ticks - 1 = 99
